// COMSOL Multiphysics 5.3.0.260 model "fresnel_lens.mph"
// Fresnel Lens
// modeldescr_/fresnel_lens
// This model simulates a 16 level first order focusing Fresnel lens with 50 µm diameter and 150 µm focal length. In one simulation, the Electromagnetic Waves, Frequency Domain interface computes the electric field in the Fresnel lens and the surrounding air domain extended to the focal plane. In the other calculation, the electric field at the exit plane right above the Fresnel lens is propagated to the focal plane using the Fresnel approximation. The electric fields at the focal plane calculated by the two methods are compared. The results are in very good agreement.
// Outline of the model tree

Parameters
  wl = 0.5[um]  // Wavelength
  k0 = 2*pi/wl  // Wave number
  f = 150[um]  // Focal length
  R = f/2  // Radius of curvature of lens surface
  D = 50[um]  // Lens diameter
  m = 1  // Fresnel lens order
  z0 = sqrt(R^2-(D/2)^2)  // Lens base position in Z
  sag = R-z0  // Unfolded lens sag
  n = 1.5  // Refractive index
  d = m*wl/(n-1)  // Folded lens sag for m-th order
  M = 16  // Digitization level
  dm = d/M  // Step height per level
  N = floor(sag/d)+1  // Number of zones
  Nmesh = 5  // The number of mesh elements per wavelength

Selections
  sel1: Explicit "Exterior Boundaries" on boundaries adjacent to all domains
  box1: Box "Input Plane"
    entitydim = 1
    inputent = selections
    input = {sel1}
    xmin = -D/2
    xmax = D/2
    ymin = -dm
    ymax = +dm/2
    condition = inside
  dif1: Difference "Scattering Boundaries" | entitydim = 1; add = {sel1}; subtract = {box1}
  sel2: Explicit "Exit Plane" on boundaries 6

Couplings
  intop1: Integration on selection sel2

Geometry
  geom1 "Geometry 1" (2D, length unit µm)
    pi1: PartInstance "Fresnel Lens Zone 1"
      part = part1
      inputname = zone
      inputexpr = 1
      inputvalue = 1.0
      selnameobj = Fresnel Lens Zone
      seltagobj = pi1_csel1
      selnamepnt = Fresnel Lens Zone
      selshowpnt = on
      seltagpnt = pi1_csel1.pnt
      selnamebnd = Fresnel Lens Zone
      selshowbnd = on
      seltagbnd = pi1_csel1.bnd
      selnamedom = Fresnel Lens Zone
      selcontributetodom = csel1
      selshowdom = on
      seltagdom = pi1_csel1.dom
      selkeepnoncontr = off
      lengthunit = µm
    pi2: PartInstance "Fresnel Lens Zone 2"
      part = part1
      inputname = zone
      inputexpr = 2
      inputvalue = 2.0
      selnameobj = Fresnel Lens Zone
      seltagobj = pi2_csel1
      selnamepnt = Fresnel Lens Zone
      selshowpnt = on
      seltagpnt = pi2_csel1.pnt
      selnamebnd = Fresnel Lens Zone
      selshowbnd = on
      seltagbnd = pi2_csel1.bnd
      selnamedom = Fresnel Lens Zone
      selcontributetodom = csel1
      selshowdom = on
      seltagdom = pi2_csel1.dom
      selkeepnoncontr = off
      lengthunit = µm
    pi3: PartInstance "Fresnel Lens Zone 3"
      part = part1
      inputname = zone
      inputexpr = 3
      inputvalue = 3.0
      selnameobj = Fresnel Lens Zone
      seltagobj = pi3_csel1
      selnamepnt = Fresnel Lens Zone
      selshowpnt = on
      seltagpnt = pi3_csel1.pnt
      selnamebnd = Fresnel Lens Zone
      selshowbnd = on
      seltagbnd = pi3_csel1.bnd
      selnamedom = Fresnel Lens Zone
      selcontributetodom = csel1
      selshowdom = on
      seltagdom = pi3_csel1.dom
      selkeepnoncontr = off
      lengthunit = µm
    pi4: PartInstance "Fresnel Lens Zone 4"
      part = part1
      inputname = zone
      inputexpr = 4
      inputvalue = 4.0
      selnameobj = Fresnel Lens Zone
      seltagobj = pi4_csel1
      selnamepnt = Fresnel Lens Zone
      selshowpnt = on
      seltagpnt = pi4_csel1.pnt
      selnamebnd = Fresnel Lens Zone
      selshowbnd = on
      seltagbnd = pi4_csel1.bnd
      selnamedom = Fresnel Lens Zone
      selcontributetodom = csel1
      selshowdom = on
      seltagdom = pi4_csel1.dom
      selkeepnoncontr = off
      lengthunit = µm
    pi5: PartInstance "Fresnel Lens Zone 5"
      part = part1
      inputname = zone
      inputexpr = 5
      inputvalue = 5.0
      selnameobj = Fresnel Lens Zone
      seltagobj = pi5_csel1
      selnamepnt = Fresnel Lens Zone
      selshowpnt = on
      seltagpnt = pi5_csel1.pnt
      selnamebnd = Fresnel Lens Zone
      selshowbnd = on
      seltagbnd = pi5_csel1.bnd
      selnamedom = Fresnel Lens Zone
      selcontributetodom = csel1
      selshowdom = on
      seltagdom = pi5_csel1.dom
      selkeepnoncontr = off
      lengthunit = µm
    uni1: Union | input = pi1, pi2, pi3, pi4, pi5; intbnd = off; edge = all
    mir1: Mirror | input = uni1; keep = on; axis = {1, 0}
    uni2: Union | input = mir1, uni1; intbnd = off; edge = all
    r1: Rectangle | pos = {-D/2, -dm}; size = {D, d+dm}
    int1: Intersection | input = r1, uni2
    r2: Rectangle | pos = {-D/2, -dm}; layername = Layer 1; layer = d+dm; size = {D, f+dm}
    fin: Finalize "Form Union"
  part1 "Fresnel Lens Zone" (2D, length unit µm)
    pol1: Polygon
      contributeto = csel1
      x = x0 x0 x1 x1 x2 x2 x3 x3 x4 x4 x5 x5 x6 x6 x7 x7 x8 x8 x9 x9 x10 x10 x11 x11 x12 x12 x13 x13 x14 x14 x15 x15 x16 x16
      y = y0 y1 y1 y2 y2 y3 y3 y4 y4 y5 y5 y6 y6 y7 y7 y8 y8 y9 y9 y10 y10 y11 y11 y12 y12 y13 y13 y14 y14 y15 y15 y16 y16 y0

Materials
  mat1: Common "Air" on all domains
    def "Basic"
      relpermeability = 1
      relpermittivity = 1
      dynamicviscosity = eta(T[1/K])[Pa*s]
      ratioofspecificheat = 1.4
      electricconductivity = 0[S/m]
      heatcapacity = Cp(T[1/K])[J/(kg*K)]
      density = rho(pA[1/Pa],T[1/K])[kg/m^3]
      thermalconductivity = k(T[1/K])[W/(m*K)]
      soundspeed = cs(T[1/K])[m/s]
      eta: Piecewise | arg = T; pieces = {200.0, 1600.0, -8.38278E-7+8.35717342E-8*T^1-7.69429583E-11*T^2+4.6437266E-14*T^3-1.06585607E-17*T^4}
      Cp: Piecewise | arg = T; pieces = {200.0, 1600.0, 1047.63657-0.372589265*T^1+9.45304214E-4*T^2-6.02409443E-7*T^3+1.2858961E-10*T^4}
      rho: Analytic | expr = pA*0.02897/8.314/T; args = {pA, T}; dermethod = manual; argders = {{pA, d(pA*0.02897/8.314/T,pA)}, {T, d(pA*0.02897/8.314/T,T)}}
      k: Piecewise | arg = T; pieces = {200.0, 1600.0, -0.00227583562+1.15480022E-4*T^1-7.90252856E-8*T^2+4.11702505E-11*T^3-7.43864331E-15*T^4}
      cs: Analytic | expr = sqrt(1.4*287*T); args = T; dermethod = manual; argders = {T, d(sqrt(1.4*287*T),T)}
    RefractiveIndex
      n = 1
      ki = 0
  mat2: Common "Glass" on selection geom1_csel1_dom
    RefractiveIndex
      n = n
      ki = 0

Physics
  ewfd: ElectromagneticWavesFrequencyDomain on all domains
    dependent variable E = {Ex, Ey, Ez}
    components.components = outofplane
    wee1: WaveEquationElectric (default)
    pec1: PerfectElectricConductor (default)
    init1: init "Initial Values 1" (default)
    sctr1: Scattering "Scattering Boundary Condition 1" on selection box1 | IncidentField = EField; E0i = {0, 0, 1}
    sctr2: Scattering "Scattering Boundary Condition 2" on selection dif1

Mesh
  mesh1 "Mesh 1"
    size: MeshSizeDefault | hmax = wl/Nmesh; custom = on
    ftri1: FreeTri "Free Triangular 1" on domains 1, 2
      size1: Size on domains 1 | hmax = wl/n/Nmesh; custom = on
    map1: Map "Mapped 1" on remaining entities

Studies
  std1 "Study 1"
    wave: Wavelength "Wavelength Domain" | plist = wl

Solver configurations
  sol1 "Solution 1" (study std1)
    v1: Variables "Dependent Variables 1"
    s1: Stationary "Stationary Solver 1" | stol = 0.01
      p1: Parametric | pname = lambda0; plistarr = wl; punit = µm; pcontinuationmode = no
      fc1: FullyCoupled | linsolver = d1
      d1: Direct "Suggested Direct Solver (ewfd)"

Datasets
  dset1: Solution | solution = sol1
  grid1: Grid1D | source = data; data = dset1; par1 = u; parmin1 = -D/2; parmax1 = D/2

Plots
  pg1: PlotGroup2D "Electric Field Norm" | data = dset1
    surf1: Surface | expr = ewfd.normE
  pg2: PlotGroup2D "Electric Field Amplitude" | data = dset1
    surf1: Surface | expr = ewfd.Ez
  pg3: PlotGroup2D "Electric Field Norm Near Lens" | data = dset1
    surf1: Surface | expr = ewfd.normE
  pg4: PlotGroup2D "Electric Field Amplitude Near Lens" | data = dset1
    surf1: Surface | expr = ewfd.Ez
  pg5: PlotGroup1D "Electric Field Amplitude at Exit Plane" | data = dset1
    lngr1: LineGraph on selection sel2 | expr = ewfd.Ez; xdata = expr; xdataexpr = x
  pg6: PlotGroup1D "Electric Field Phase Exit Plane" | data = dset1
    lngr1: LineGraph on selection sel2 | expr = arg(ewfd.Ez); xdata = expr; xdataexpr = x
  pg7: PlotGroup1D "Fresnel Versus Helmholtz Comparison"
    data = grid1
    title = Comparison Between the Fresnel Approximation and the Helmholtz Equation
    xlabel = x-coordinate (µm)
    ylabel = Electric field amplitude (a.u.)
    lngr1: LineGraph "Fresnel Approximation"
      expr = 1/sqrt(wl*f)*abs(intop1(ewfd.Ez*exp(-i*k0*x^2/(2*f))*exp(-i*2*pi*dest(u)*x/(wl*f))))
      descr = Diffraction integral
      xdata = expr
      xdataexpr = u*1e6
      legends = Fresnel Approximation
    lngr2: LineGraph "Helmholtz Equation" on boundaries 7
      data = dset1
      expr = ewfd.normE
      xdata = expr
      xdataexpr = x
      legends = Helmholtz Equation