// COMSOL Multiphysics 5.3.0.260 model "beam_splitter.mph"
// Beam Splitter
// modeldescr_woptics/beam_splitter
// A beam splitter is used for splitting a beam of light in two. One way of making a splitter is to deposit a thin layer of metal between two glass prisms. The beam is slightly attenuated within the layer and then split into two paths. This example models the thin metal layer using a transition boundary condition, which reduces the memory requirements. Losses in the metal layer are also computed.
// Outline of the model tree

Parameters
  lda0 = 700[nm]  // Vacuum wavelength
  lda = lda0/1.5  // Material wavelength
  f0 = c_const/lda0  // Frequency
  h_max = 0.2*lda  // Maximum mesh element size
  eps_Ag = -16.5-1.06*i  // Relative dielectric constant, Silver

Geometry
  geom1 "Geometry 1" (2D, length unit µm)
    pol1: Polygon | x = {-10, -10, 10}; y = {-10, 10, 10}
    rot1: Rotate | input = pol1; keep = on; rot = 180
    fin: Finalize "Form Union"

Materials
  mat1: Common "Glass (quartz)" on all domains
    def "Basic"
      relpermeability = 1
      electricconductivity = 1e-14[S/m]
      relpermittivity = 4.2
      density = 2210[kg/m^3]
      thermalconductivity = 1.4[W/(m*K)]
      heatcapacity = 730[J/(kg*K)]
    RefractiveIndex
      n = 1.5
      ki = 0

Physics
  ewfd: ElectromagneticWavesFrequencyDomain on all domains
    dependent variable E = {Ex, Ey, Ez}
    wee1: WaveEquationElectric (default)
    pec1: PerfectElectricConductor (default)
    init1: init "Initial Values 1" (default)
    sctr1: Scattering "Scattering Boundary Condition 1" on boundaries 2, 4, 5
    port1: Port on boundaries 1 | beta = ewfd.k; E0 = {0, 0, exp(-(y/3500[nm])^2)}
    trans1: TransitionBoundaryCondition on boundaries 3
      DisplacementFieldModel = RelativePermittivity
      epsilonr_mat = userdef
      epsilonr = eps_Ag
      d = 13[nm]
      murbnd_mat = userdef
      murbnd = 1
      sigmabnd_mat = userdef
      sigmabnd = 0

Mesh
  mesh1 "Mesh 1"
    size: MeshSizeDefault | hmax = 1.34; hmin = 0.006; hcurve = 0.3; hgrad = 1.3
    size1: Size on entire geometry | hmax = h_max; custom = on
    ftri1: FreeTri "Free Triangular 1" on remaining entities

Studies
  std1 "Study 1"
    freq: Frequency "Frequency Domain" | plist = f0

Solver configurations
  sol1 "Solution 1" (study std1)
    v1: Variables "Dependent Variables 1"
    s1: Stationary "Stationary Solver 1" | stol = 0.01
      p1: Parametric | pname = freq; plistarr = f0; punit = Hz; pcontinuationmode = no
      fc1: FullyCoupled | linsolver = d1
      d1: Direct "Suggested Direct Solver (ewfd)"

Datasets
  dset1: Solution | solution = sol1

Plots
  pg1: PlotGroup2D "Electric Field (ewfd)" | data = dset1
    surf1: Surface | expr = ewfd.normE
  pg2: PlotGroup1D "1D Plot Group 2" | data = dset1
    lngr1: LineGraph on boundaries 1 | expr = -ewfd.nPoav; xdata = expr; xdataexpr = y
    lngr2: LineGraph on boundaries 5 | expr = ewfd.nPoav; xdata = expr; xdataexpr = y
    lngr3: LineGraph on boundaries 4 | expr = ewfd.nPoav; xdata = expr; xdataexpr = x
    lngr4: LineGraph on boundaries 3 | expr = ewfd.Qsrh; xdata = expr; xdataexpr = x